// SBML level 3 version 2

model biocrnpyler_864280()
  // model units - substance: mole, time: second, volume: litre, area: square_metre, length: metre, extent: mole

  // Compartments:
  compartment default_combinedbiocrnpyler_864280 = 1e-6;

  // Species:
  species rna_proton_pump_combinedbiocrnpyler_864280 in default_combinedbiocrnpyler_864280 = 0;
  species dna_proton_pump_combinedbiocrnpyler_864280 in default_combinedbiocrnpyler_864280 = 10/default_combinedbiocrnpyler_864280;
  species protein_proton_pump_combinedbiocrnpyler_864280 in default_combinedbiocrnpyler_864280 = 0;
  species protein_proton_pump_b_combinedbiocrnpyler_864280 in default_combinedbiocrnpyler_864280 = 0;
  species rna_atpsyn_combinedbiocrnpyler_864280 in default_combinedbiocrnpyler_864280 = 0;
  species dna_atpsyn_combinedbiocrnpyler_864280 in default_combinedbiocrnpyler_864280 = 10/default_combinedbiocrnpyler_864280;
  species protein_atpsyn_combinedbiocrnpyler_864280 in default_combinedbiocrnpyler_864280 = 0;
  species protein_atpsyn_b_combinedbiocrnpyler_864280 in default_combinedbiocrnpyler_864280 = 0;
  species protein_RNAP_machinery_combinedbiocrnpyler_864280 in default_combinedbiocrnpyler_864280 = 10/default_combinedbiocrnpyler_864280;
  species protein_Ribo_machinery_combinedbiocrnpyler_864280 in default_combinedbiocrnpyler_864280 = 10/default_combinedbiocrnpyler_864280;
  species protein_RNAse_machinery_combinedbiocrnpyler_864280 in default_combinedbiocrnpyler_864280 = 10/default_combinedbiocrnpyler_864280;
  species complex_dna_proton_pump_protein_RNAP_machinery_combinedbiocrnpyler_864280 in default_combinedbiocrnpyler_864280 = 0;
  species complex_protein_Ribo_machinery_rna_proton_pump_combinedbiocrnpyler_864280 in default_combinedbiocrnpyler_864280 = 0;
  species complex_protein_RNAse_machinery_rna_proton_pump_combinedbiocrnpyler_864280 in default_combinedbiocrnpyler_864280 = 0;
  species complex_dna_atpsyn_protein_RNAP_machinery_combinedbiocrnpyler_864280 in default_combinedbiocrnpyler_864280 = 0;
  species complex_protein_Ribo_machinery_rna_atpsyn_combinedbiocrnpyler_864280 in default_combinedbiocrnpyler_864280 = 0;
  species complex_protein_RNAse_machinery_rna_atpsyn_combinedbiocrnpyler_864280 in default_combinedbiocrnpyler_864280 = 0;

  // Reactions:
  r0_combinedbiocrnpyler_864280: dna_proton_pump_combinedbiocrnpyler_864280 + protein_RNAP_machinery_combinedbiocrnpyler_864280 => complex_dna_proton_pump_protein_RNAP_machinery_combinedbiocrnpyler_864280; r0_combinedbiocrnpyler_864280_k*dna_proton_pump_combinedbiocrnpyler_864280*protein_RNAP_machinery_combinedbiocrnpyler_864280;
    r0_combinedbiocrnpyler_864280_k = 100;
  r1_combinedbiocrnpyler_864280: complex_dna_proton_pump_protein_RNAP_machinery_combinedbiocrnpyler_864280 => rna_proton_pump_combinedbiocrnpyler_864280 + protein_RNAP_machinery_combinedbiocrnpyler_864280; r1_combinedbiocrnpyler_864280_k*complex_dna_proton_pump_protein_RNAP_machinery_combinedbiocrnpyler_864280;
    r1_combinedbiocrnpyler_864280_k = 0.05;
  r2_combinedbiocrnpyler_864280: rna_proton_pump_combinedbiocrnpyler_864280 + protein_Ribo_machinery_combinedbiocrnpyler_864280 => complex_protein_Ribo_machinery_rna_proton_pump_combinedbiocrnpyler_864280; r2_combinedbiocrnpyler_864280_k*rna_proton_pump_combinedbiocrnpyler_864280*protein_Ribo_machinery_combinedbiocrnpyler_864280;
    r2_combinedbiocrnpyler_864280_k = 100;
  r3_combinedbiocrnpyler_864280: complex_protein_Ribo_machinery_rna_proton_pump_combinedbiocrnpyler_864280 => rna_proton_pump_combinedbiocrnpyler_864280 + protein_proton_pump_combinedbiocrnpyler_864280 + protein_Ribo_machinery_combinedbiocrnpyler_864280; r3_combinedbiocrnpyler_864280_k*complex_protein_Ribo_machinery_rna_proton_pump_combinedbiocrnpyler_864280;
    r3_combinedbiocrnpyler_864280_k = 0.05;
  r4_combinedbiocrnpyler_864280: rna_proton_pump_combinedbiocrnpyler_864280 + protein_RNAse_machinery_combinedbiocrnpyler_864280 => complex_protein_RNAse_machinery_rna_proton_pump_combinedbiocrnpyler_864280; r4_combinedbiocrnpyler_864280_k*rna_proton_pump_combinedbiocrnpyler_864280*protein_RNAse_machinery_combinedbiocrnpyler_864280;
    r4_combinedbiocrnpyler_864280_k = 100;
  r5_combinedbiocrnpyler_864280: complex_protein_RNAse_machinery_rna_proton_pump_combinedbiocrnpyler_864280 => protein_RNAse_machinery_combinedbiocrnpyler_864280; r5_combinedbiocrnpyler_864280_k*complex_protein_RNAse_machinery_rna_proton_pump_combinedbiocrnpyler_864280;
    r5_combinedbiocrnpyler_864280_k = 0.001;
  r6_combinedbiocrnpyler_864280: protein_proton_pump_combinedbiocrnpyler_864280 => protein_proton_pump_b_combinedbiocrnpyler_864280; r6_combinedbiocrnpyler_864280_k*protein_proton_pump_combinedbiocrnpyler_864280;
    r6_combinedbiocrnpyler_864280_k = 0.0003;
  r7_combinedbiocrnpyler_864280: dna_atpsyn_combinedbiocrnpyler_864280 + protein_RNAP_machinery_combinedbiocrnpyler_864280 => complex_dna_atpsyn_protein_RNAP_machinery_combinedbiocrnpyler_864280; r7_combinedbiocrnpyler_864280_k*dna_atpsyn_combinedbiocrnpyler_864280*protein_RNAP_machinery_combinedbiocrnpyler_864280;
    r7_combinedbiocrnpyler_864280_k = 100;
  r8_combinedbiocrnpyler_864280: complex_dna_atpsyn_protein_RNAP_machinery_combinedbiocrnpyler_864280 => rna_atpsyn_combinedbiocrnpyler_864280 + protein_RNAP_machinery_combinedbiocrnpyler_864280; r8_combinedbiocrnpyler_864280_k*complex_dna_atpsyn_protein_RNAP_machinery_combinedbiocrnpyler_864280;
    r8_combinedbiocrnpyler_864280_k = 0.05;
  r9_combinedbiocrnpyler_864280: rna_atpsyn_combinedbiocrnpyler_864280 + protein_Ribo_machinery_combinedbiocrnpyler_864280 => complex_protein_Ribo_machinery_rna_atpsyn_combinedbiocrnpyler_864280; r9_combinedbiocrnpyler_864280_k*rna_atpsyn_combinedbiocrnpyler_864280*protein_Ribo_machinery_combinedbiocrnpyler_864280;
    r9_combinedbiocrnpyler_864280_k = 100;
  r10_combinedbiocrnpyler_864280: complex_protein_Ribo_machinery_rna_atpsyn_combinedbiocrnpyler_864280 => rna_atpsyn_combinedbiocrnpyler_864280 + protein_atpsyn_combinedbiocrnpyler_864280 + protein_Ribo_machinery_combinedbiocrnpyler_864280; r10_combinedbiocrnpyler_864280_k*complex_protein_Ribo_machinery_rna_atpsyn_combinedbiocrnpyler_864280;
    r10_combinedbiocrnpyler_864280_k = 0.05;
  r11_combinedbiocrnpyler_864280: rna_atpsyn_combinedbiocrnpyler_864280 + protein_RNAse_machinery_combinedbiocrnpyler_864280 => complex_protein_RNAse_machinery_rna_atpsyn_combinedbiocrnpyler_864280; r11_combinedbiocrnpyler_864280_k*rna_atpsyn_combinedbiocrnpyler_864280*protein_RNAse_machinery_combinedbiocrnpyler_864280;
    r11_combinedbiocrnpyler_864280_k = 100;
  r12_combinedbiocrnpyler_864280: complex_protein_RNAse_machinery_rna_atpsyn_combinedbiocrnpyler_864280 => protein_RNAse_machinery_combinedbiocrnpyler_864280; r12_combinedbiocrnpyler_864280_k*complex_protein_RNAse_machinery_rna_atpsyn_combinedbiocrnpyler_864280;
    r12_combinedbiocrnpyler_864280_k = 0.001;
  r13_combinedbiocrnpyler_864280: protein_atpsyn_combinedbiocrnpyler_864280 => protein_atpsyn_b_combinedbiocrnpyler_864280; r13_combinedbiocrnpyler_864280_k*protein_atpsyn_combinedbiocrnpyler_864280;
    r13_combinedbiocrnpyler_864280_k = 0.0003;

  // Unit definitions:
  unit square_metre = metre^2;
end
