// SBML level 3 version 2

model combined_model_of__combined_model_of__combined_model_of__combined_model_of__combined_model_of__combined_model_of__biocrnpyler_466904_biocrnpyler_188196_biocrnpyler_708140_biocrnpyler_617483_biocrnpyler_447061_biocrnpyler_252167_biocrnpyler_765046()
  // model units - substance: mole, time: second, volume: litre, area: square_metre, length: metre, extent: mole

  // Compartments:
  compartment default_atpsyn_txtlbiocrnpyler_466904_combined_combined = 7e-6;
  compartment default_atpsynthesisbiocrnpyler_708140 = 1e-6;
  compartment default_atp_usebiocrnpyler_617483 = 1e-6;
  compartment default_combined_combined = 3e-6;
  compartment default_pp_txtlbiocrnpyler_447061 = 1e-6;
  compartment default_combined_combined_1 = 4e-6;
  compartment default_pp_mibiocrnpyler_252167 = 1e-6;
  compartment default_combined_combined_2 = 5e-6;
  compartment default_protontransportbiocrnpyler_765046 = 1e-6;
  compartment default_combined_combined_3 = 6e-6;

  // Species:
  species rna_atpsyn_atpsyn_txtlbiocrnpyler_466904 in default_atpsyn_txtlbiocrnpyler_466904_combined_combined = 0;
  species dna_atpsyn_atpsyn_txtlbiocrnpyler_466904 in default_atpsyn_txtlbiocrnpyler_466904_combined_combined = 10/default_atpsyn_txtlbiocrnpyler_466904_combined_combined;
  species complex_dna_atpsyn_protein_RNAP_machinery_atpsyn_txtlbiocrnpyler_466904 in default_atpsyn_txtlbiocrnpyler_466904_combined_combined = 0;
  species complex_protein_Ribo_machinery_rna_atpsyn_atpsyn_txtlbiocrnpyler_466904 in default_atpsyn_txtlbiocrnpyler_466904_combined_combined = 0;
  species complex_protein_RNAse_machinery_rna_atpsyn_atpsyn_txtlbiocrnpyler_466904 in default_atpsyn_txtlbiocrnpyler_466904_combined_combined = 0;
  species protein_atpsyn_atpsyn_txtlbiocrnpyler_466904_1_combined in default_atpsyn_txtlbiocrnpyler_466904_combined_combined = 0;
  species protein_atpsyn_b_atpsyn_mibiocrnpyler_188196_1_combined in default_atpsynthesisbiocrnpyler_708140 = 0;
  species rna_proton_pump_pp_txtlbiocrnpyler_447061 in default_pp_txtlbiocrnpyler_447061 = 0;
  species dna_proton_pump_pp_txtlbiocrnpyler_447061 in default_pp_txtlbiocrnpyler_447061 = 10/default_pp_txtlbiocrnpyler_447061;
  species protein_RNAP_machinery_atpsyn_txtlbiocrnpyler_466904_1_combined in default_pp_txtlbiocrnpyler_447061 = 10/default_pp_txtlbiocrnpyler_447061;
  species protein_Ribo_machinery_atpsyn_txtlbiocrnpyler_466904_1_combined in default_pp_txtlbiocrnpyler_447061 = 10/default_pp_txtlbiocrnpyler_447061;
  species protein_RNAse_machinery_atpsyn_txtlbiocrnpyler_466904_1_combined in default_pp_txtlbiocrnpyler_447061 = 10/default_pp_txtlbiocrnpyler_447061;
  species complex_dna_proton_pump_protein_RNAP_machinery_pp_txtlbiocrnpyler_447061 in default_pp_txtlbiocrnpyler_447061 = 0;
  species complex_protein_Ribo_machinery_rna_proton_pump_pp_txtlbiocrnpyler_447061 in default_pp_txtlbiocrnpyler_447061 = 0;
  species complex_protein_RNAse_machinery_rna_proton_pump_pp_txtlbiocrnpyler_447061 in default_pp_txtlbiocrnpyler_447061 = 0;
  species protein_proton_pump_pp_txtlbiocrnpyler_447061_1_combined in default_pp_mibiocrnpyler_252167 = 0;
  species protein_proton_pump_b_pp_mibiocrnpyler_252167 in default_pp_mibiocrnpyler_252167 = 0;
  species proton_outside_H_atpsynthesisbiocrnpyler_708140_1_combined in default_protontransportbiocrnpyler_765046 = 10/default_protontransportbiocrnpyler_765046;
  species proton_inside_H_atpsynthesisbiocrnpyler_708140_1_combined in default_protontransportbiocrnpyler_765046 = 0;
  species metabolite_adp_atpsynthesisbiocrnpyler_708140_1_combined_1_combined in default_protontransportbiocrnpyler_765046 = 0;
  species metabolite_atp_atpsynthesisbiocrnpyler_708140_1_combined_1_combined in default_protontransportbiocrnpyler_765046 = 10/default_protontransportbiocrnpyler_765046;
  species metabolite_pi_atpsynthesisbiocrnpyler_708140_1_combined_1_combined in default_protontransportbiocrnpyler_765046 = 0;

  // Reactions:
  r0_atpsyn_txtlbiocrnpyler_466904: dna_atpsyn_atpsyn_txtlbiocrnpyler_466904 + protein_RNAP_machinery_atpsyn_txtlbiocrnpyler_466904_1_combined => complex_dna_atpsyn_protein_RNAP_machinery_atpsyn_txtlbiocrnpyler_466904; r0_atpsyn_txtlbiocrnpyler_466904_k*dna_atpsyn_atpsyn_txtlbiocrnpyler_466904*protein_RNAP_machinery_atpsyn_txtlbiocrnpyler_466904_1_combined;
    r0_atpsyn_txtlbiocrnpyler_466904_k = 100;
  r1_atpsyn_txtlbiocrnpyler_466904: complex_dna_atpsyn_protein_RNAP_machinery_atpsyn_txtlbiocrnpyler_466904 => rna_atpsyn_atpsyn_txtlbiocrnpyler_466904 + protein_RNAP_machinery_atpsyn_txtlbiocrnpyler_466904_1_combined; r1_atpsyn_txtlbiocrnpyler_466904_k*complex_dna_atpsyn_protein_RNAP_machinery_atpsyn_txtlbiocrnpyler_466904;
    r1_atpsyn_txtlbiocrnpyler_466904_k = 0.05;
  r2_atpsyn_txtlbiocrnpyler_466904: rna_atpsyn_atpsyn_txtlbiocrnpyler_466904 + protein_Ribo_machinery_atpsyn_txtlbiocrnpyler_466904_1_combined => complex_protein_Ribo_machinery_rna_atpsyn_atpsyn_txtlbiocrnpyler_466904; r2_atpsyn_txtlbiocrnpyler_466904_k*rna_atpsyn_atpsyn_txtlbiocrnpyler_466904*protein_Ribo_machinery_atpsyn_txtlbiocrnpyler_466904_1_combined;
    r2_atpsyn_txtlbiocrnpyler_466904_k = 100;
  r3_atpsyn_txtlbiocrnpyler_466904: complex_protein_Ribo_machinery_rna_atpsyn_atpsyn_txtlbiocrnpyler_466904 => rna_atpsyn_atpsyn_txtlbiocrnpyler_466904 + protein_atpsyn_atpsyn_txtlbiocrnpyler_466904_1_combined + protein_Ribo_machinery_atpsyn_txtlbiocrnpyler_466904_1_combined; r3_atpsyn_txtlbiocrnpyler_466904_k*complex_protein_Ribo_machinery_rna_atpsyn_atpsyn_txtlbiocrnpyler_466904;
    r3_atpsyn_txtlbiocrnpyler_466904_k = 0.05;
  r4_atpsyn_txtlbiocrnpyler_466904: rna_atpsyn_atpsyn_txtlbiocrnpyler_466904 + protein_RNAse_machinery_atpsyn_txtlbiocrnpyler_466904_1_combined => complex_protein_RNAse_machinery_rna_atpsyn_atpsyn_txtlbiocrnpyler_466904; r4_atpsyn_txtlbiocrnpyler_466904_k*rna_atpsyn_atpsyn_txtlbiocrnpyler_466904*protein_RNAse_machinery_atpsyn_txtlbiocrnpyler_466904_1_combined;
    r4_atpsyn_txtlbiocrnpyler_466904_k = 100;
  r5_atpsyn_txtlbiocrnpyler_466904: complex_protein_RNAse_machinery_rna_atpsyn_atpsyn_txtlbiocrnpyler_466904 => protein_RNAse_machinery_atpsyn_txtlbiocrnpyler_466904_1_combined; r5_atpsyn_txtlbiocrnpyler_466904_k*complex_protein_RNAse_machinery_rna_atpsyn_atpsyn_txtlbiocrnpyler_466904;
    r5_atpsyn_txtlbiocrnpyler_466904_k = 0.001;
  r0_atpsyn_mibiocrnpyler_188196: protein_atpsyn_atpsyn_txtlbiocrnpyler_466904_1_combined => protein_atpsyn_b_atpsyn_mibiocrnpyler_188196_1_combined; r0_atpsyn_mibiocrnpyler_188196_k*protein_atpsyn_atpsyn_txtlbiocrnpyler_466904_1_combined;
    r0_atpsyn_mibiocrnpyler_188196_k = 0.0003;
  r0_atpsynthesisbiocrnpyler_708140: 4 proton_outside_H_atpsynthesisbiocrnpyler_708140_1_combined + metabolite_adp_atpsynthesisbiocrnpyler_708140_1_combined_1_combined + metabolite_pi_atpsynthesisbiocrnpyler_708140_1_combined_1_combined + protein_atpsyn_b_atpsyn_mibiocrnpyler_188196_1_combined => 4 proton_inside_H_atpsynthesisbiocrnpyler_708140_1_combined + metabolite_atp_atpsynthesisbiocrnpyler_708140_1_combined_1_combined + protein_atpsyn_b_atpsyn_mibiocrnpyler_188196_1_combined; r0_atpsynthesisbiocrnpyler_708140_k*proton_outside_H_atpsynthesisbiocrnpyler_708140_1_combined^4*metabolite_adp_atpsynthesisbiocrnpyler_708140_1_combined_1_combined*metabolite_pi_atpsynthesisbiocrnpyler_708140_1_combined_1_combined*protein_atpsyn_b_atpsyn_mibiocrnpyler_188196_1_combined;
    r0_atpsynthesisbiocrnpyler_708140_k = 2;
  r0_atp_usebiocrnpyler_617483: metabolite_atp_atpsynthesisbiocrnpyler_708140_1_combined_1_combined => metabolite_adp_atpsynthesisbiocrnpyler_708140_1_combined_1_combined + metabolite_pi_atpsynthesisbiocrnpyler_708140_1_combined_1_combined; r0_atp_usebiocrnpyler_617483_k*metabolite_atp_atpsynthesisbiocrnpyler_708140_1_combined_1_combined;
    r0_atp_usebiocrnpyler_617483_k = 5;
  r0_pp_txtlbiocrnpyler_447061: dna_proton_pump_pp_txtlbiocrnpyler_447061 + protein_RNAP_machinery_atpsyn_txtlbiocrnpyler_466904_1_combined => complex_dna_proton_pump_protein_RNAP_machinery_pp_txtlbiocrnpyler_447061; r0_pp_txtlbiocrnpyler_447061_k*dna_proton_pump_pp_txtlbiocrnpyler_447061*protein_RNAP_machinery_atpsyn_txtlbiocrnpyler_466904_1_combined;
    r0_pp_txtlbiocrnpyler_447061_k = 100;
  r1_pp_txtlbiocrnpyler_447061: complex_dna_proton_pump_protein_RNAP_machinery_pp_txtlbiocrnpyler_447061 => rna_proton_pump_pp_txtlbiocrnpyler_447061 + protein_RNAP_machinery_atpsyn_txtlbiocrnpyler_466904_1_combined; r1_pp_txtlbiocrnpyler_447061_k*complex_dna_proton_pump_protein_RNAP_machinery_pp_txtlbiocrnpyler_447061;
    r1_pp_txtlbiocrnpyler_447061_k = 0.05;
  r2_pp_txtlbiocrnpyler_447061: rna_proton_pump_pp_txtlbiocrnpyler_447061 + protein_Ribo_machinery_atpsyn_txtlbiocrnpyler_466904_1_combined => complex_protein_Ribo_machinery_rna_proton_pump_pp_txtlbiocrnpyler_447061; r2_pp_txtlbiocrnpyler_447061_k*rna_proton_pump_pp_txtlbiocrnpyler_447061*protein_Ribo_machinery_atpsyn_txtlbiocrnpyler_466904_1_combined;
    r2_pp_txtlbiocrnpyler_447061_k = 100;
  r3_pp_txtlbiocrnpyler_447061: complex_protein_Ribo_machinery_rna_proton_pump_pp_txtlbiocrnpyler_447061 => rna_proton_pump_pp_txtlbiocrnpyler_447061 + protein_proton_pump_pp_txtlbiocrnpyler_447061_1_combined + protein_Ribo_machinery_atpsyn_txtlbiocrnpyler_466904_1_combined; r3_pp_txtlbiocrnpyler_447061_k*complex_protein_Ribo_machinery_rna_proton_pump_pp_txtlbiocrnpyler_447061;
    r3_pp_txtlbiocrnpyler_447061_k = 0.05;
  r4_pp_txtlbiocrnpyler_447061: rna_proton_pump_pp_txtlbiocrnpyler_447061 + protein_RNAse_machinery_atpsyn_txtlbiocrnpyler_466904_1_combined => complex_protein_RNAse_machinery_rna_proton_pump_pp_txtlbiocrnpyler_447061; r4_pp_txtlbiocrnpyler_447061_k*rna_proton_pump_pp_txtlbiocrnpyler_447061*protein_RNAse_machinery_atpsyn_txtlbiocrnpyler_466904_1_combined;
    r4_pp_txtlbiocrnpyler_447061_k = 100;
  r5_pp_txtlbiocrnpyler_447061: complex_protein_RNAse_machinery_rna_proton_pump_pp_txtlbiocrnpyler_447061 => protein_RNAse_machinery_atpsyn_txtlbiocrnpyler_466904_1_combined; r5_pp_txtlbiocrnpyler_447061_k*complex_protein_RNAse_machinery_rna_proton_pump_pp_txtlbiocrnpyler_447061;
    r5_pp_txtlbiocrnpyler_447061_k = 0.001;
  r0_pp_mibiocrnpyler_252167: protein_proton_pump_pp_txtlbiocrnpyler_447061_1_combined => protein_proton_pump_b_pp_mibiocrnpyler_252167; r0_pp_mibiocrnpyler_252167_k*protein_proton_pump_pp_txtlbiocrnpyler_447061_1_combined;
    r0_pp_mibiocrnpyler_252167_k = 0.0003;
  r0_protontransportbiocrnpyler_765046: metabolite_adp_atpsynthesisbiocrnpyler_708140_1_combined_1_combined + metabolite_pi_atpsynthesisbiocrnpyler_708140_1_combined_1_combined => metabolite_atp_atpsynthesisbiocrnpyler_708140_1_combined_1_combined; r0_protontransportbiocrnpyler_765046_k*metabolite_adp_atpsynthesisbiocrnpyler_708140_1_combined_1_combined*metabolite_pi_atpsynthesisbiocrnpyler_708140_1_combined_1_combined;
    r0_protontransportbiocrnpyler_765046_k = 2;
  r1_protontransportbiocrnpyler_765046: 4 proton_inside_H_atpsynthesisbiocrnpyler_708140_1_combined => 4 proton_outside_H_atpsynthesisbiocrnpyler_708140_1_combined; r1_protontransportbiocrnpyler_765046_k*proton_inside_H_atpsynthesisbiocrnpyler_708140_1_combined^4;
    r1_protontransportbiocrnpyler_765046_k = 2;

  // Unit definitions:
  unit square_metre = metre^2;
end
