// SBML level 3 version 2

model combined_model_of__combined_model_of__external_reservoir_model_combined_model_of__atc_membrane_dnaexp_membrane_combined_model_of__biocrnpyler_203358()
  // model units - substance: mole, time: second, volume: litre, area: square_metre, length: metre, extent: mole

  // Compartments:
  compartment cell_2_internal_combined = 3e-6 litre;
  compartment cell_2_external_combined_1 = 1e-6 litre;

  // Species:
  species atc_e_external_reservoir_model_1_combined in cell_2_external_combined_1 = 10000/cell_2_external_combined_1;
  species atc_i in cell_2_internal_combined = 0;
  species ssDNA_e in cell_2_external_combined_1 = 0;
  species ssDNA in cell_2_internal_combined = 100/cell_2_internal_combined;
  species VirE2_b_ssDNA in cell_2_internal_combined = 0;
  species dna_g_biocrnpyler_203358 in cell_2_internal_combined = 1/cell_2_internal_combined;
  species tetR_biocrnpyler_203358 in cell_2_internal_combined = 10/cell_2_internal_combined;
  species rna_g_biocrnpyler_203358 in cell_2_internal_combined = 0;
  species VirE2_f_biocrnpyler_203358 in cell_2_internal_combined = 0;
  species ATP_biocrnpyler_203358 in cell_2_internal_combined = 5/cell_2_internal_combined;
  species ADP_biocrnpyler_203358 in cell_2_internal_combined = 0;
  species aTc_i_biocrnpyler_203358 in cell_2_internal_combined = 0;
  species complex_aTc_i_tetR_biocrnpyler_203358 in cell_2_internal_combined = 0;
  species VirE2_b_1_combined in cell_2_internal_combined = 0;
  species complex_dna_g_tetR_biocrnpyler_203358 in cell_2_internal_combined = 0;
  species complex_aTc_i_dna_g_tetR_biocrnpyler_203358 in cell_2_internal_combined = 0;
  species P_biocrnpyler_203358 in cell_2_internal_combined = 0;

  // Parameters:
  kb = 0.2 per_second;
  kd = 0.01 per_second;
  kb1 = 0.05 per_second;
  kd1 = 0.0001 per_second;
  kd2 = 0.1 per_second;

  // Reactions:
  r1: atc_e_external_reservoir_model_1_combined -> atc_i; kb*atc_e_external_reservoir_model_1_combined - kd*atc_i;
  R1: VirE2_b_1_combined + ssDNA -> VirE2_b_ssDNA; kb1*VirE2_b_1_combined*ssDNA - kd1*VirE2_b_ssDNA;
  R2: VirE2_b_ssDNA => ssDNA_e + VirE2_b_1_combined; kd2*VirE2_b_ssDNA;
  r0_biocrnpyler_203358: dna_g_biocrnpyler_203358 + tetR_biocrnpyler_203358 => complex_dna_g_tetR_biocrnpyler_203358; r0_biocrnpyler_203358_k*dna_g_biocrnpyler_203358*tetR_biocrnpyler_203358;
    r0_biocrnpyler_203358_k = 0.001;
  r0_1_biocrnpyler_203358: complex_dna_g_tetR_biocrnpyler_203358 => dna_g_biocrnpyler_203358 + tetR_biocrnpyler_203358; r0_1_biocrnpyler_203358_k*complex_dna_g_tetR_biocrnpyler_203358;
    r0_1_biocrnpyler_203358_k = 1e-5;
  r2_biocrnpyler_203358: complex_dna_g_tetR_biocrnpyler_203358 + aTc_i_biocrnpyler_203358 => complex_aTc_i_dna_g_tetR_biocrnpyler_203358; r2_biocrnpyler_203358_k*complex_dna_g_tetR_biocrnpyler_203358*aTc_i_biocrnpyler_203358;
    r2_biocrnpyler_203358_k = 0.065;
  r2_1_biocrnpyler_203358: complex_aTc_i_dna_g_tetR_biocrnpyler_203358 => complex_dna_g_tetR_biocrnpyler_203358 + aTc_i_biocrnpyler_203358; r2_1_biocrnpyler_203358_k*complex_aTc_i_dna_g_tetR_biocrnpyler_203358;
    r2_1_biocrnpyler_203358_k = 0.0003;
  r4_biocrnpyler_203358: complex_aTc_i_dna_g_tetR_biocrnpyler_203358 => dna_g_biocrnpyler_203358 + complex_aTc_i_tetR_biocrnpyler_203358; r4_biocrnpyler_203358_k*complex_aTc_i_dna_g_tetR_biocrnpyler_203358;
    r4_biocrnpyler_203358_k = 100;
  r4_1_biocrnpyler_203358: dna_g_biocrnpyler_203358 + complex_aTc_i_tetR_biocrnpyler_203358 => complex_aTc_i_dna_g_tetR_biocrnpyler_203358; r4_1_biocrnpyler_203358_k*dna_g_biocrnpyler_203358*complex_aTc_i_tetR_biocrnpyler_203358;
    r4_1_biocrnpyler_203358_k = 10;
  r6_biocrnpyler_203358: dna_g_biocrnpyler_203358 => dna_g_biocrnpyler_203358 + rna_g_biocrnpyler_203358; r6_biocrnpyler_203358_k*dna_g_biocrnpyler_203358/(tetR_biocrnpyler_203358^r6_biocrnpyler_203358_n + r6_biocrnpyler_203358_K);
    r6_biocrnpyler_203358_k = 0.01875; r6_biocrnpyler_203358_n = 1; r6_biocrnpyler_203358_K = 20;
  r7_biocrnpyler_203358: dna_g_biocrnpyler_203358 => dna_g_biocrnpyler_203358 + rna_g_biocrnpyler_203358; r7_biocrnpyler_203358_k*dna_g_biocrnpyler_203358;
    r7_biocrnpyler_203358_k = 0.001;
  r8_biocrnpyler_203358: rna_g_biocrnpyler_203358 + ATP_biocrnpyler_203358 => rna_g_biocrnpyler_203358 + ADP_biocrnpyler_203358 + VirE2_f_biocrnpyler_203358 + P_biocrnpyler_203358; r8_biocrnpyler_203358_k*rna_g_biocrnpyler_203358*ATP_biocrnpyler_203358^r8_biocrnpyler_203358_n/(ATP_biocrnpyler_203358^r8_biocrnpyler_203358_n + r8_biocrnpyler_203358_K);
    r8_biocrnpyler_203358_k = 0.6; r8_biocrnpyler_203358_n = 1; r8_biocrnpyler_203358_K = 1;
  r9_biocrnpyler_203358: VirE2_f_biocrnpyler_203358 => VirE2_b_1_combined; r9_biocrnpyler_203358_k*VirE2_f_biocrnpyler_203358;
    r9_biocrnpyler_203358_k = 1;
  r10_biocrnpyler_203358: rna_g_biocrnpyler_203358 => ; r10_biocrnpyler_203358_k*rna_g_biocrnpyler_203358;
    r10_biocrnpyler_203358_k = 0.001;
  r11_biocrnpyler_203358: VirE2_f_biocrnpyler_203358 => ; r11_biocrnpyler_203358_k*VirE2_f_biocrnpyler_203358;
    r11_biocrnpyler_203358_k = 1e-5;

  // Unit definitions:
  unit square_metre = metre^2;
  unit per_second = 1 / second;
  unit substance = dimensionless;
end
